// SBML level 2 version 3

model AutoRegulatoryNetwork()

  // Compartments:
  compartment Cell = 1;

  // Species:
  species Gene in Cell = 10/Cell;
  species P2Gene in Cell = 0;
  species Rna in Cell = 0;
  species P in Cell = 0;
  species P2 in Cell = 0;

  // Parameters:
  k1 = 1;
  k1r = 10;
  k2 = 0.01;
  k3 = 10;
  k4 = 1;
  k4r = 1;
  k5 = 0.1;
  k6 = 0.01;

  // Reactions:
  RepressionBinding: Gene + P2 => P2Gene; k1*Gene*P2;
  ReverseRepressionBinding: P2Gene => Gene + P2; k1r*P2Gene;
  Transcription: Gene => Gene + Rna; k2*Gene;
  Translation: Rna => Rna + P; k3*Rna;
  Dimerisation: 2 P => P2; k4*0.5*P*(P - 1);
  Disassociation: P2 => 2 P; k4r*P2;
  RnaDegredation: Rna => ; k5*Rna;
  ProteinDegredation: P => ; k6*P;
end
